TOL := 10^-20
# 1. Встроенными методами
D := [
    1.342, 0.432, -0.599, 0.202;
    0.432, 1.342, 0.256, -0.599;
    -0.599, 0.256, 1.342, 0.532;
    0.202, -0.599, 0.532, 1.342
]
C := [0.05, 0, 0, 0; 0, 0.03, 0, 0; 0, 0, 0.02, 0; 0, 0, 0, 0.04]
A := D + 21*C
L := eigenvals(A)
W := eigenvecs(A)
L = [0.726971; 2.09138; 2.52928; 2.96037]
W = [
    0.403177, -0.161621, 0.650876, -0.622646;
    -0.494547, -0.682538, -0.29418, -0.450581;
    0.602245, -0.662238, -0.129381, 0.426618;
    -0.479763, -0.263555, 0.687808, 0.476746
]
A = [
    2.392, 0.432, -0.599, 0.202;
    0.432, 1.972, 0.256, -0.599;
    -0.599, 0.256, 1.762, 0.532;
    0.202, -0.599, 0.532, 2.182
]
# 2. Степенной метод | 3. Метод вращений
n := 100
k := 0 .. n
y[0] := [1; 1; 1; 1]
y[k + 1] := A*y[k]
λ := y[n + 1][0]/y[n][0]
λ = 2.96037
y[n + 1] := y[n + 1]/|y[n + 1]|
Невязка
A*y[n + 1] - λ*y[n + 1] = [3.21916e-8; 2.45341e-7; -1.13923e-7; -3.68855e-7]
