a := 0.2
f(x) := sin(3*x/4) - x^2 - 4
b := 4
# Точки для вычисления погрешности интерполяции
j := 0 .. 137
t[j] := a + (b - a)*j/137
# Равноотстоящие узлы
n := [5; 10; 15; 20; 25; 30; 40; 50; 60; 70]
N := n[0]
i := 0 .. N
x[i] := a + (b - a)*i/N
L(t) := sum(f(x[k])*product(if(k - i, (t - x[i])/(x[k] - x[i]), 1), i = 0 .. N), k = 0 .. N)
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# Погрешность интерполяции
s[j] := |f(t[j]) - L(t[j])|
r[0] := max(s)
N := n[1]
i := 0 .. N
x[i] := a + (b - a)*i/N
L(t) := sum(f(x[k])*product(if(k - i, (t - x[i])/(x[k] - x[i]), 1), i = 0 .. N), k = 0 .. N)
s[j] := |f(t[j]) - L(t[j])|
r[1] := max(s)
N := n[2]
i := 0 .. N
x[i] := a + (b - a)*i/N
L(t) := sum(f(x[k])*product(if(k - i, (t - x[i])/(x[k] - x[i]), 1), i = 0 .. N), k = 0 .. N)
s[j] := |f(t[j]) - L(t[j])|
r[2] := max(s)
N := n[3]
i := 0 .. N
x[i] := a + (b - a)*i/N
L(t) := sum(f(x[k])*product(if(k - i, (t - x[i])/(x[k] - x[i]), 1), i = 0 .. N), k = 0 .. N)
s[j] := |f(t[j]) - L(t[j])|
r[3] := max(s)
N := n[4]
i := 0 .. N
x[i] := a + (b - a)*i/N
L(t) := sum(f(x[k])*product(if(k - i, (t - x[i])/(x[k] - x[i]), 1), i = 0 .. N), k = 0 .. N)
s[j] := |f(t[j]) - L(t[j])|
r[4] := max(s)
N := n[5]
i := 0 .. N
x[i] := a + (b - a)*i/N
L(t) := sum(f(x[k])*product(if(k - i, (t - x[i])/(x[k] - x[i]), 1), i = 0 .. N), k = 0 .. N)
s[j] := |f(t[j]) - L(t[j])|
r[5] := max(s)
N := n[6]
i := 0 .. N
x[i] := a + (b - a)*i/N
L(t) := sum(f(x[k])*product(if(k - i, (t - x[i])/(x[k] - x[i]), 1), i = 0 .. N), k = 0 .. N)
s[j] := |f(t[j]) - L(t[j])|
r[6] := max(s)
N := n[7]
i := 0 .. N
x[i] := a + (b - a)*i/N
L(t) := sum(f(x[k])*product(if(k - i, (t - x[i])/(x[k] - x[i]), 1), i = 0 .. N), k = 0 .. N)
s[j] := |f(t[j]) - L(t[j])|
r[7] := max(s)
N := n[8]
i := 0 .. N
x[i] := a + (b - a)*i/N
L(t) := sum(f(x[k])*product(if(k - i, (t - x[i])/(x[k] - x[i]), 1), i = 0 .. N), k = 0 .. N)
s[j] := |f(t[j]) - L(t[j])|
r[8] := max(s)
N := n[9]
i := 0 .. N
x[i] := a + (b - a)*i/N
L(t) := sum(f(x[k])*product(if(k - i, (t - x[i])/(x[k] - x[i]), 1), i = 0 .. N), k = 0 .. N)
r = [0.000744479; 1.17816e-9; 7.38964e-13; 1.56817e-11; 2.56087e-10; 5.83126e-9; 2.83709e-6; 0.0035343; 2.72051]
# Чебышевские узлы
N := n[0]
i := 0 .. N
v[i] := cos(π*(1 + 2*i)/(2*(N + 1)))
z[i] := (a + b)/2 + (b - a)/2*v[i]
LCH(t) := sum(f(z[k])*product(if(k - i, (t - z[i])/(z[k] - z[i]), 1), i = 0 .. N), k = 0 .. N)
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# Погрешность интерполяции
s[j] := |f(t[j]) - LCH(t[j])|
rch[0] := max(s)
N := n[1]
i := 0 .. N
v[i] := cos(π*(1 + 2*i)/(2*(N + 1)))
z[i] := (a + b)/2 + (b - a)/2*v[i]
LCH(t) := sum(f(z[k])*product(if(k - i, (t - z[i])/(z[k] - z[i]), 1), i = 0 .. N), k = 0 .. N)
s[j] := |f(t[j]) - LCH(t[j])|
rch[1] := max(s)
N := n[2]
i := 0 .. N
v[i] := cos(π*(1 + 2*i)/(2*(N + 1)))
z[i] := (a + b)/2 + (b - a)/2*v[i]
LCH(t) := sum(f(z[k])*product(if(k - i, (t - z[i])/(z[k] - z[i]), 1), i = 0 .. N), k = 0 .. N)
s[j] := |f(t[j]) - LCH(t[j])|
rch[2] := max(s)
N := n[3]
i := 0 .. N
v[i] := cos(π*(1 + 2*i)/(2*(N + 1)))
z[i] := (a + b)/2 + (b - a)/2*v[i]
LCH(t) := sum(f(z[k])*product(if(k - i, (t - z[i])/(z[k] - z[i]), 1), i = 0 .. N), k = 0 .. N)
s[j] := |f(t[j]) - LCH(t[j])|
rch[3] := max(s)
N := n[4]
i := 0 .. N
v[i] := cos(π*(1 + 2*i)/(2*(N + 1)))
z[i] := (a + b)/2 + (b - a)/2*v[i]
LCH(t) := sum(f(z[k])*product(if(k - i, (t - z[i])/(z[k] - z[i]), 1), i = 0 .. N), k = 0 .. N)
s[j] := |f(t[j]) - LCH(t[j])|
rch[4] := max(s)
N := n[5]
i := 0 .. N
v[i] := cos(π*(1 + 2*i)/(2*(N + 1)))
z[i] := (a + b)/2 + (b - a)/2*v[i]
LCH(t) := sum(f(z[k])*product(if(k - i, (t - z[i])/(z[k] - z[i]), 1), i = 0 .. N), k = 0 .. N)
s[j] := |f(t[j]) - LCH(t[j])|
rch[5] := max(s)
N := n[6]
i := 0 .. N
v[i] := cos(π*(1 + 2*i)/(2*(N + 1)))
z[i] := (a + b)/2 + (b - a)/2*v[i]
LCH(t) := sum(f(z[k])*product(if(k - i, (t - z[i])/(z[k] - z[i]), 1), i = 0 .. N), k = 0 .. N)
s[j] := |f(t[j]) - LCH(t[j])|
rch[6] := max(s)
N := n[7]
i := 0 .. N
v[i] := cos(π*(1 + 2*i)/(2*(N + 1)))
z[i] := (a + b)/2 + (b - a)/2*v[i]
LCH(t) := sum(f(z[k])*product(if(k - i, (t - z[i])/(z[k] - z[i]), 1), i = 0 .. N), k = 0 .. N)
s[j] := |f(t[j]) - LCH(t[j])|
rch[7] := max(s)
N := n[8]
i := 0 .. N
v[i] := cos(π*(1 + 2*i)/(2*(N + 1)))
z[i] := (a + b)/2 + (b - a)/2*v[i]
LCH(t) := sum(f(z[k])*product(if(k - i, (t - z[i])/(z[k] - z[i]), 1), i = 0 .. N), k = 0 .. N)
s[j] := |f(t[j]) - LCH(t[j])|
rch[8] := max(s)
N := n[9]
i := 0 .. N
v[i] := cos(π*(1 + 2*i)/(2*(N + 1)))
z[i] := (a + b)/2 + (b - a)/2*v[i]
LCH(t) := sum(f(z[k])*product(if(k - i, (t - z[i])/(z[k] - z[i]), 1), i = 0 .. N), k = 0 .. N)
rch = [0.000343814; 1.41885e-10; 1.42109e-14; 1.77636e-14; 2.13163e-14; 2.4869e-14; 3.19744e-14; 2.30926e-14; 2.4869e-14]
# Графики погрешностей интерполяций двух типов узлов
m := 0 .. 9
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