# Среднеквадратичные приближения
n := 10
x := [1.2; 1.3; 1.4; 1.6; 1.7; 1.9; 2.1; 2.2; 2.4; 2.6; 2.7]
y := [0.670; 0.517; 0.435; 0.280; 0.254; 0.296; 0.314; 0.381; 0.432; 0.482; 0.521]
s(j) := sum(x[i]^j, i = 0 .. n)
b(j) := sum(y[i]*x[i]^j, i = 0 .. n)
A2 := [s(0), s(1), s(2); s(1), s(2), s(3); s(2), s(3), s(4)]
B2 := [b(0); b(1); b(2)]
a2 := lsolve(A2, B2)
a2 = [2.37043; -2.12358; 0.539569]
p2(t) := sum(a2[k]*t^k, k = 0 .. 2)
A3 := [s(0), s(1), s(2), s(3); s(1), s(2), s(3), s(4); s(2), s(3), s(4), s(5); s(3), s(4), s(5), s(6)]
B3 := [b(0); b(1); b(2); b(3)]
a3 := lsolve(A3, B3)
p3(t) := sum(a3[k]*t^k, k = 0 .. 3)
a8 := regress(x, y, 8)
p8(t) := interp(a8, x, y, t)
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# Погрешности
i := 0 .. n
# Абсолютная погрешность
ar2[i] := |y[i] - p2(x[i])|
max(ar2) = 0.0740005
ar3[i] := |y[i] - p3(x[i])|
max(ar3) = 0.0241993
ar8[i] := |y[i] - p8(x[i])|
max(ar8) = 0.0223351
# Среднеквадратичная погрешность
sr2 := 1*sqrt(sum(ar2[i]^2, i))/(n + 1)
sr2 = 0.0146989
sr3 := 1*sqrt(sum(ar3[i]^2, i))/(n + 1)
sr3 = 0.00427927
sr8 := 1*sqrt(sum(ar8[i]^2, i))/(n + 1)
sr8 = 0.00295261
