a := 0.2
b := 2
f(x) := tan(3/4*x) - x^2 - 4
I := integral(f(x), x = a .. b)
I = -6.34735
# Формула средних прямоугольников
k := 1 .. 10
n[k] := 2^k
h[k] := (b - a)/n[k]
J[k] := sum(h*f(a + h/2 + k*h), i = 0 .. n[k] - 1)
# Абсолютные величины
# разностей значений интеграла
# Оценка погрешности по методу Рунге
# Скорость сходимости
(теоритическая*О(h))
k := 2 .. 10
R[k] := |J[k] - J[k - 1]|/3
Z[k] := |I - J[k]|
Z[k] = [57.4232; 133.714; 477.353; 1097.21; 2543.24; 7372.38; 22509.6; 44648; 104930]
R[k] = [16.4495; 25.4301; 114.546; 206.618; 482.012; 1609.71; 5045.73; 7379.48; 20094]
R[k - 1]/R[k] = [0; 0.646852; 0.222007; 0.554386; 0.428658; 0.29944; 0.319024; 0.683751; 0.367247]
# Квадратурная формула Гаусса
m := 4
j := 1 .. 4
x[1] := 0.06943184
x[3] := 0.66999052
c[1] := 0.17392742
c[3] := 0.32607258
x[2] := 0.33000948
x[4] := 0.93056815
c[2] := 0.32607258
c[4] := 0.17392742
z[j] := a + (b - a)*x[j]
Z[k] = [57.4232; 133.714; 477.353; 1097.21; 2543.24; 7372.38; 22509.6; 44648; 104930]
G := (b - a)*sum(c[j]*f(z[j]), j = 1 .. m)
G = -6.46892
|G - I| = 0.121571
# Нужное количество узлов: 16 (k=4)
