# Уравнение в нормальной форме
f(x, u) := -(u*ln(u + 1))/(0.5*x)
a := 1
b := 3
X[0] := 1
# Разностная схема Эйлера
n := 5000
h := (b - a)/n
k := 0 .. n - 1
t[k] := a + k*h
X[k + 1] := X[k] + h*f(t[k], X[k])
X[k] =  # no stored result
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# График приближенного решения
# Оценка погрешности по методу Рунге
Y[0] := 1
n := 2*n
h := (b - a)/n
k := 0 .. n - 1
t[k] := a + k*h
Y[k + 1] := Y[k] + h*f(t[k], Y[k])
m := 0 .. n/2
Z1[m] := |X[m] - Y[2*m]|
max(Z1) = 6.19489e-5
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# График погрешности блиближенного решения
# Разностная схема Эйлера-Коши
# Модифицированная схема Эйлера
σ := 1
X1[0] := X[0]
n := 200
h := (b - a)/n
k := 0 .. n
t[k] := a + k*h
X1[k + 1] := X1[k] + h*f(t[k] + h/2, X1[k] + h/2*f(t[k], X1[k]))
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# График приближенного решения
k := 1 .. n - 1
Z2[k] := |X[k] - X[k - 1]|
max(Z2) = 0.000554518
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# График погрешности приближенного решения
s := 1
D(t, s) := f(t, s)
W := rkfixed(s, a, b, n, D)
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W = [
    1, 1;
    1.01, 0.986368;
    1.02, 0.973183;
    1.03, 0.960423;
    1.04, 0.948069;
    1.05, 0.936101;
    1.06, 0.924503;
    1.07, 0.913256;
    1.08, 0.902347;
    1.09, 0.891759
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]
X1 = [
    1; 0.98637; 0.973187; 0.960429; 0.948077; 0.936111; 0.924514; 0.913269; 0.902361; 0.891774
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]
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# Разность приближенных решений двух предыдущих методов
