# Краевая задача для ОДУ 2го порядка
# Исходные данные задачи
p(x) := 1 - 0.2*x^2
q(x) := sqrt(1 + x^2)
f(x) := x + 3.3/(1 + 2*x^2)
aa := 0.1
bb := 2
μ[1] := 1
μ[2] := 0
# Параметры разностной схемы
n := 500
i := 0 .. n
h := (bb - aa)/n
x[i] := aa + i*h
i := 1 .. n - 1
b[i] := 1
a[i] := 1 - p(x[i])*h
c[i] := 2 - p(x[i])*h + q(x[i])*h^2
g[i] := -f(x[i])
# Метод прогонки
α[1] := 0
β[1] := μ[1]
α[i + 1] := b[i]/(c[i] - a[i]*α[i])
β[i + 1] := (h^2*g[i] + a[i]*β[i])/(c[i] - a[i]*α[i])
i := n - 1 .. 1
y1[0] := μ[1]
y1[n] := μ[2]
y1[i] := α[i + 1]*y1[i + 1] + β[i + 1]
i := 0 .. n
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n := 2*n
i := 0 .. n
h := (bb - aa)/n
x[i] := aa + i*h
i := 1 .. n - 1
b[i] := 1
a[i] := 1 - p(x[i])*h
c[i] := 2 - p(x[i])*h + q(x[i])*h^2
g[i] := -f(x[i])
α[1] := 0
β[1] := μ[1]
α[i + 1] := b[i]/(c[i] - a[i]*α[i])
β[i + 1] := (h^2*g[i] + a[i]*β[i])/(c[i] - a[i]*α[i])
i := n - 1 .. 1
y2[0] := μ[1]
y2[n] := μ[2]
y2[i] := α[i + 1]*y2[i + 1] + β[i + 1]
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# Оценка погрешности
j := 0 .. n/2
r[j] := |y1[j] - y2[2*j]|
max(r) = 0.000561074
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# Решающий блок
Given
(d^2/dt^2(w(t))) + p(t)*(d/dt(w(t))) - q(t)*w(t) == f(t)
w(aa) == μ[1]
w(bb) == μ[2]
w := Odesolve(t, bb)
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